// COMSOL Multiphysics 6.0.0.318 model "pesti_new.mph"
// Pesticide Transport and Reaction in Soil
// This example investigates the degradation of the insecticide Aldicarb. The carbamate initially decomposes into a sulfone which subsequently decays into a sulfoxide. Biodegradation reactions provide important pathways to reduce the amounts of toxic substances. A second modeling stages uses the computed reaction kinetics in a space-dependent model that describes the contamination of soil through Aldicarb transport and reaction.
// Outline of the model tree

Parameters
  k_1 = 0.36[1/d]  // Rate constant, reaction 1
  k_2 = 0.024[1/d]  // Rate constant, reaction 2
  k_3 = 0.2[1/d]  // Rate constant, reaction 3
  k_4 = 0.01[1/d]  // Rate constant, reaction 4
  k_5 = 0.0524[1/d]  // Rate constant, reaction 5
  rho = 1e3[kg/m^3]  // Fluid density
  thetas_1 = 0.339  // Porosity, layer 1
  thetas_2 = 0.399  // Porosity, layer 2
  thetar_1 = 0.001  // Residual saturation, layer 1
  thetar_2 = 0.001  // Residual saturation, layer 2
  Ss_1 = 0.339[1/m]/(g_const*rho)  // Storage coefficient, layer 1
  Ss_2 = 0.399[1/m]/(g_const*rho)  // Storage coefficient, layer 2
  Ks_1 = 0.454[m/d]  // Saturated hydraulic conductivity, layer 1
  Ks_2 = 0.298[m/d]  // Saturated hydraulic conductivity, layer 2
  alpha_1 = 1.39[1/m]  // Parameter alpha, layer 1
  alpha_2 = 1.74[1/m]  // Parameter alpha, layer 2
  n_1 = 1.6  // Parameter n, layer 1
  n_2 = 1.38  // Parameter n, layer 2
  Hp0 = 0.01[m]  // Pressure head in the ring
  N0 = 0.01*Ks_1*rho  // Leak from the base
  c0 = 1[mol/m^3]  // Solute concentration in the ring
  rhob = 1300[kg/m^3]  // Bulk density
  kp_a = 1e-4[m^3/kg]  // Partition coefficient, aldicarb
  kp_asx = 0.5e-4[m^3/kg]  // Partition coefficient, aldicarb sulfoxide
  kp_asn = 2e-4[m^3/kg]  // Partition coefficient, aldicarb sulfone
  Dl = 3.74e-3[m^2/d]  // Diffusion coefficient, liquid phase
  Dg = 0.432[m^2/d]  // Diffusion coefficient, gas phase
  alphar = 0.005[m]  // Longitudinal dispersivity
  alphaz = 0.001[m]  // Transverse dispersivity
  kg_a = 1.33e-7  // Volatilization
  kg_asn = 1.33e-3  // Volatilization
  d_s = 0.05[m]  // Thickness of the concentration boundary layer

Functions
  int1: Interpolation "initcon"
    funcs = {{intH, 1}, {inttheta, 2}, {inta, 3}, {intasn, 4}, {intasx, 5}}
    source = file
    filename = D:\Pycharm\CPqPy/case2\Results\infile.txt
    nargs = 2
    defvars = on
    frame = mesh
    fununit = {m, 1, mol/m^3, mol/m^3, mol/m^3}
    argunit = {m, m}

Variables
  var1 "Variables 1"
    r_1 = k_1*a  // Rate expression 1
    r_2 = k_2*asx  // Rate expression 2
    r_3 = k_3*a  // Rate expression 3
    r_4 = k_4*asx  // Rate expression 4
    r_5 = k_5*asn  // Rate expression 5

Geometry
  geom1 "Geometry 1" (2D axisymmetric, length unit m)
    r1: Rectangle | pos = {0, -1.3}; size = {1.25, 0.9}
    r2: Rectangle | pos = {0, -0.4}; size = {1.25, 0.4}
    pt1: Point | p = {0.25, 0}
    fin: Finalize "Form Union"

Physics
  dl: RichardsEquation on all domains
    dependent variable p
    usporous1: UnsaturatedPorousMedium (default)
      storageModelType = userdef
      Sp = Ss_1
      permeabilityModelType = conductivity
      fluid1: FluidPorousMedium "Fluid 1" (default) | rho_mat = userdef; rho = rho
      pm1: PorousMatrixPorousMedium "Porous Matrix 1" (default)
        permeabilityModelType = conductivity
        Ks = Ks_1
        theta_r = thetar_1
        alpha = alpha_1
        n = n_1
        epsilon_mat = userdef
        epsilon = thetas_1
    axi1: AxialSymmetry (default)
    nf1: NoFlow (default)
    init1: init "Initial Values 1" (default) | InitType = Hp; Hp = intH
    init2: init "Initial Values 2" on domains 2 | InitType = Hp; Hp = intH
    ph1: PressureHead on boundaries 5 | Hp0 = Hp0
    mf1: MassFlux on boundaries 2 | N0 = -N0
    gr1: Gravity
    usporous2: UnsaturatedPorousMedium "Unsaturated Porous Medium 2a" on domains 2
      storageModelType = userdef
      Sp = Ss_2
      permeabilityModelType = conductivity
      fluid1: FluidPorousMedium "Fluid 1" (default) | rho_mat = userdef; rho = rho
      pm1: PorousMatrixPorousMedium "Porous Matrix 1" (default)
        permeabilityModelType = conductivity
        Ks = Ks_2
        theta_r = thetar_2
        alpha = alpha_2
        n = n_2
        epsilon_mat = userdef
        epsilon = thetas_2
  tds: DilutedSpeciesPorousMedia "Transport of Diluted Species in Porous Media" on all domains
    dependent variable a = {a, asx, asn}
    TransportMechanism.DispersionInPorousMedia = 1
    TransportMechanism.VolatilizationInPartiallySaturatedPorousMedia = 1
    MassConsistentStabilization.glim_mass = (0.1[mol/m^3])/tds.helem
    AdvancedSettings.BackCompState = 0
    porous1: PorousMedium (default)
      fluid1: FluidPorousMedium "Fluid 1" (default) | u_src = root.comp1.dl.u
      pm1: PorousMatrixPorousMedium "Porous Matrix 1" (default) | poro_mat = userdef; poro = thetas_1
      ads1: Adsorptions "Adsorption 1" on all domains | rho_db_mat = userdef; rho_db = rhob; species = {1, 1, 1}
      disp1: Dispersion on all domains
    axi1: AxialSymmetry (default)
    nflx1: NoFlux (default) | IncludeConvection = 1
    init1: init "Initial Values 1" (default) | initc = {inta, intasx, intasn}
    out1: Outflow on boundaries 2, 7, 8
    conc1: Concentration on boundaries 5 | species = {1, 1, 1}; c0 = {c0, 0, 0}
    reac1: Reactions (disabled) on domains 1, 2
      R_a = dl.theta_l*(-r_1-r_3)
      R_asx = dl.theta_l*(r_1-r_2-r_4)
      R_asn = dl.theta_l*(r_2-r_5)

Mesh
  mesh1 "Mesh 1"
    size: MeshSizeDefault | hauto = 3
    ftri1: FreeTri "Free Triangular 1" on remaining entities
      size1: Size on domains 2 | hmax = 0.03; custom = on

Studies
  std2 "Study 2"
    time: Transient "Time Dependent" | tlist = range(0,8640,8640)

Solver configurations
  sol2 "Solution 2" (study std2)
    v1: Variables "Dependent Variables 1"
    t1: Time "Time-Dependent Solver 1" | tlist = range(0,8640,8640); rtol = 0.005; maxorder = 2; stabcntrl = on
      fc1: FullyCoupled
        linsolver = d1
        maxiter = 8
        damp = 0.9
        jtech = once
        stabacc = aacc
        aaccdim = 5
        aaccmix = 0.9
        aaccdelay = 1
      d1: Direct "Direct, pressure (dl) (merged)" | linsolver = pardiso; pivotperturb = 1.0E-13

Datasets
  dset2: Solution | solution = sol2
  rev1: Revolve2D "Revolution 2D" | data = dset2; startangle = -90; revangle = 225

Plots
  pg5: PlotGroup3D "Pressure (dl) 1" | data = rev1
    surf1: Surface | expr = dl.theta_l
  pg6: PlotGroup2D "Concentration, aldicarb" | data = dset2
    surf1: Surface | data = dset2; expr = dl.theta_l; descr = Liquid volume fraction
    con1: Contour | expr = dl.theta_l; descr = Liquid volume fraction; levels = 0.03; contourlabels = on
  pg7: PlotGroup3D "Concentration (tds) 1" | data = rev1
    surf1: Surface | expr = asx
  pg8: PlotGroup2D "Concentration, aldicarb sulfoxide" | data = dset2; plotarrayenable = on
    surf1: Surface | expr = asx
  pg9: PlotGroup1D "1D Plot Group 9" | data = dset2
    lngr1: LineGraph on boundaries 1, 3 | expr = a

Exports
  data4: Data "out"
    data = dset2
    expr = {dl.Hp, dl.theta_l, a, asn, asx}
    unit = {m, 1, mol/m^3, mol/m^3, mol/m^3}
    descr = {Pressure head, Liquid volume fraction, Concentration, Concentration, Concentration}
    filename = D:\Pycharm\CPqPy/case2\Results\out_2.txt